*Heading
** Job name: GAPCON_Test_model Model name: Model-1
** Generated by: Abaqus/CAE 2023
** AUTHOR: Youngbin LIM
** CONTACT: lyb0684@naver.com
*Preprint, echo=NO, model=NO, history=NO, contact=NO
** ----------------------------------------------------------------
**
** PART INSTANCE: Part-1-1
**
*Node
      1,           5.,           5.,           5.
      2,           5.,          4.5,           5.
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*Element, type=DC3D8
   1,  122,  123,  134,  133,    1,    2,   13,   12
   2,  123,  124,  135,  134,    2,    3,   14,   13
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*Nset, nset=Part-1-1_Set-1, generate
    1,  1331,     1
*Elset, elset=Part-1-1_Set-1, generate
    1,  1000,     1
** Section: Section-1
*Solid Section, elset=Part-1-1_Set-1, material=Material-1
,
** ----------------------------------------------------------------
**
** PART INSTANCE: Part-1-2
**
*System
         7.5,          0.,          0.,         8.5,          0.,          0.
*Node
   1332,           5.,           5.,           5.
   1333,           5.,          4.5,           5.
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*Element, type=DC3D8
1001, 1453, 1454, 1465, 1464, 1332, 1333, 1344, 1343
1002, 1454, 1455, 1466, 1465, 1333, 1334, 1345, 1344
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*Nset, nset=Part-1-2_Set-1, generate
 1332,  2662,     1
*Elset, elset=Part-1-2_Set-1, generate
1001, 2000,    1
** Section: Section-1
*Solid Section, elset=Part-1-2_Set-1, material=Material-1
,
** ----------------------------------------------------------------
**
** PART INSTANCE: Part-1-3
**
*System
          0.,          5.,          0.,          1.,          5.,          0.
*Node
   2663,           5.,           5.,           5.
   2664,           5.,          4.5,           5.
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*Element, type=DC3D8
2001, 2784, 2785, 2796, 2795, 2663, 2664, 2675, 2674
2002, 2785, 2786, 2797, 2796, 2664, 2665, 2676, 2675
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*Nset, nset=Part-1-3_Set-1, generate
 2663,  3993,     1
*Elset, elset=Part-1-3_Set-1, generate
2001, 3000,    1
** Section: Section-1
*Solid Section, elset=Part-1-3_Set-1, material=Material-1
,
** ----------------------------------------------------------------
**
** PART INSTANCE: Part-1-4
**
*System
         7.5,          5.,          0.,         8.5,          5.,          0.
*Node
   3994,           5.,           5.,           5.
   3995,           5.,          4.5,           5.
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*Element, type=DC3D8
3001, 4115, 4116, 4127, 4126, 3994, 3995, 4006, 4005
3002, 4116, 4117, 4128, 4127, 3995, 3996, 4007, 4006
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*Nset, nset=Part-1-4_Set-1, generate
 3994,  5324,     1
*Elset, elset=Part-1-4_Set-1, generate
3001, 4000,    1
** Section: Section-1
*Solid Section, elset=Part-1-4_Set-1, material=Material-1
,
*System
*Nset, nset=Set-1, generate
    1,  1331,     1
*Nset, nset=Set-1, generate
 1332,  2662,     1
*Elset, elset=Set-1, generate
    1,  1000,     1
*Elset, elset=Set-1, generate
1001, 2000,    1
*Nset, nset=Set-2, generate
 2663,  3993,     1
*Nset, nset=Set-2, generate
 3994,  5324,     1
*Elset, elset=Set-2, generate
2001, 3000,    1
*Elset, elset=Set-2, generate
3001, 4000,    1
*Elset, elset=_Surf_Inc_S4, generate
2010, 3000,   10
*Surface, type=ELEMENT, name=SURF_INC
_Surf_Inc_S4, S4
*Elset, elset=_m_Surf-1_S6, generate
   1,  991,   10
*Surface, type=ELEMENT, name=m_Surf-1
_m_Surf-1_S6, S6
*Elset, elset=_m_Surf-3_S6, generate
1001, 1991,   10
*Surface, type=ELEMENT, name=m_Surf-3
_m_Surf-3_S6, S6
*Elset, elset=_s_Surf-3_S4, generate
3010, 4000,   10
*Surface, type=ELEMENT, name=s_Surf-3
_s_Surf-3_S4, S4
**
** MATERIALS
**
*Material, name=Material-1
*Conductivity
0.00000001,
*Density
 7.85e-05,
*Specific Heat
 0.0005,
**
** INTERACTION PROPERTIES
**
*Surface Interaction, name=Cont
1.,
*Gap Conductance, user
**
** PREDEFINED FIELDS
**
** Name: Lower_Part   Type: Temperature
*Initial Conditions, type=TEMPERATURE
Set-1, 300.
** Name: Upper_Part   Type: Temperature
*Initial Conditions, type=TEMPERATURE
Set-2, 500.
**
** INTERACTIONS
**
** Interaction: Cont_1
*Contact Pair, interaction=Cont, type=SURFACE TO SURFACE
SURF_INC, m_Surf-1
** Interaction: Cont_2
*Contact Pair, interaction=Cont, type=SURFACE TO SURFACE
s_Surf-3, m_Surf-3
** ----------------------------------------------------------------
**
** STEP: Step-1
**
*Step, name=Step-1, nlgeom=NO, inc=10000000
*Heat Transfer, end=PERIOD, deltmx=100.
0.001, 3., 1e-10, 0.1,
**
** OUTPUT REQUESTS
**
*Restart, write, frequency=0
**
** FIELD OUTPUT: F-Output-2
**
*Output, field
*Contact Output, main=m_Surf-1, secondary=Surf_Inc
HFLA, HTL, SJDR
**
** FIELD OUTPUT: F-Output-3
**
*Contact Output, main=m_Surf-3, secondary=s_Surf-3
HFLA, HTL, SJDR
**
** FIELD OUTPUT: F-Output-1
**
*Output, field, variable=PRESELECT
*Output, history, frequency=0
*End Step
